// COMSOL Multiphysics 6.0.0.318 model "R4 140.mph"
// Inflation of a Square Airbag
// A square airbag is inflated using a constant air pressure. In some regions of the airbag the material wrinkles during inflation, as a negative principal stress develops. The wrinkling membrane model within the tension field theory gives a correct description of the stress distribution and wrinkling pattern in inflated membranes.
// Outline of the model tree

Parameters
  para = 0  // Parameter
  th = 0.014[cm]  // Thickness
  Ld = 1.2[m]  // Diagonal length of noninflated airbag
  L = Ld/sqrt(2)  // Length parameter
  EE = 16[MPa]  // Young's modulus
  Nu = 0.4  // Poisson's ratio
  Pmax = 100[kPa]  // Maximum air pressure

Functions
  int1: Interpolation "插值 1" | funcname = F; table = {{0, 100}, {1, 1}}; fununit = N/m; argunit = 1

Variables
  var1 "变量 1"
    wmax_ref = 21.75[cm]  // Transverse displacement at midpoint, reference
    vmax_ref = 12.03[cm]  // Lateral displacement at midpoint on side edge, reference
    dispmax_ref = 4.94[cm]  // Total displacement at corner point, reference
    sp1max_ref = 0.39[kN/cm^2]  // First principal stress at midpoint, reference

Probes
  pbnd1: BoundaryPoint "Boundary Point Probe 1" | dom = boundaries 1
    ppb1: PointExpr "Point Probe Expression 1" | expr = mbrn.disp; unit = µm; descr = Displacement magnitude; table = tbl1

Geometry
  geom1 "几何 1" (3D, length unit m)
    wp1: WorkPlane "工作平面 1" | unite = on
      sq1: Square "正方形 1" (disabled) | pos = {L/2, 0}; size = L/2
      c1: Circle | r = 0.004; angle = 90
    fin: Finalize "形成联合体"

Materials
  mat1: Common "材料 1" on all boundaries
    def "基本"
      density = 0
    Enu "杨氏模量和泊松比"
      E = EE
      nu = Nu

Physics
  mbrn: StructuralMembrane "膜" on all boundaries
    dependent variable u = {u, v, w}
    ShapeProperty.order_displacement = 1
    lemm1: LinearElasticModel "线弹性材料 1" (default)
      wr1: Wrinkling "褶皱 1" on all boundaries
    to1: ThicknessOffset "厚度和偏移 1" (default) | d = th
    free1: Free "自由 1" (default)
    init1: init "初始值 1" (default)
    sym1: Symmetry "对称 1" on edges 1, 2
    disp1: Displacement1 "指定位移 1" on edges 3 | Direction = {0, 0, 1}
    fl1: FaceLoad "面载荷 1" on boundaries 1 | LoadType = FollowerPressure; FollowerPressure = -Pmax*para
    el1: EdgeLoad "边载荷 1" on edges 3 | FperLength = {0, -F(para), 0}; coordinateSystem = LocalEdgeSystem
    spf1: SpringFoundation2 "弹簧基座 1" on boundaries 1 | kPerArea = diag{0, 0, 1e-3[N/m^3]}

Mesh
  mesh1 "Mesh 1" (physics-controlled)

Studies
  std1 "研究 1"
    stat: Stationary "稳态" | useparam = on; pname = para; plistarr = range(0,0.01,1)

Solver configurations
  sol1 "解 1" (study std1)
    v1: Variables "因变量 1"
      comp1_mbrn_unn: Field "Normal strain (comp1.mbrn.unn)" | scalemethod = manual; scaleval = 1e-3
      comp1_u: Field "Displacement field (comp1.u)" | scalemethod = manual; scaleval = 1e-2*0.6
    s1: Stationary "稳态求解器 1"
      dDef: Direct "直接"
      p1: Parametric "参数化 1" | paramtuning = on; pmaxstep = 0.01; porder = linear
      fc1: FullyCoupled "全耦合 1" | linsolver = dDef; dtech = const; stabacc = aacc

Datasets
  dset1: Solution | solution = sol1
  mir1: Mirror3D "三维镜像 1" | data = dset1; quickplane = xz
  mir2: Mirror3D "三维镜像 2" | data = mir1; quicky = 0.5*L
  dset2: Solution "Probe Solution 2" on boundaries 1 | solution = sol1
  cpt1: CutPoint3D "Boundary Point Probe 1" | data = dset2; pointx = 0.0; pointy = 0.0; pointz = 0.0

Derived values
  pev1: EvalPoint "Point Probe Expression 1" | data = cpt1; table = tbl1; expr = mbrn.disp

Tables
  tbl1: Table "Probe Table 1"
    para | Displacement magnitude (µm), Point: (0, 0, 0)
    0 | 0
    0.01 | 43.6525
    0.02 | 87.9482
    0.03 | 132.725
    0.04 | 177.808
    0.05 | 223.015
    0.06 | 268.166
    0.07 | 313.089
    0.08 | 357.623
    0.09 | 401.625
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
Plots
  pg1: PlotGroup3D "应力 (mbrn)" | data = mir2
    surf1: Surface "表面 1" | expr = w; unit = cm
      def: Deform "变形" | expr = {u, v, w}; descr = 位移场
  pg4: PlotGroup3D "应力 (mbrn) 1" | data = mir2
    surf1: Surface "表面 1" | expr = mbrn.sp1; unit = kN/cm^2; descr = 第一主应力
      def: Deform "变形" | expr = {u, v, w}; descr = 位移场
  pg5: PlotGroup3D "应力 (mbrn) 1.1" | data = mir2
    surf1: Surface "表面 1" | expr = mbrn.sp2; unit = kN/cm^2; descr = 第二主应力
      def: Deform "变形" | expr = {u, v, w}; descr = 位移场
  pg6: PlotGroup3D "应力 (mbrn) 1.1.1" | data = mir2
    surf1: Surface "表面 1" | expr = mbrn.iswrinkled; unit = 1; descr = 带褶皱
      def: Deform "变形" | expr = {u, v, w}; descr = 位移场
  pg7: PlotGroup1D "一维绘图组 7"
    data = dset1
    title = 点结果图: 位移场，Z 分量 (cm) 点结果图: 位移场，Y 分量 (cm) 点结果图: 位移大小 (cm) 全局: Transverse displacement at midpoint, reference (cm) 全局: Lateral displacement at midpoint on side edge, reference (cm) 全局: Total displacement at corner point, reference (cm)
    ptgr1: PointGraph "点结果图 1" | expr = w; unit = cm; legends = Transverse displacement at midpoint
    ptgr2: PointGraph "点结果图 2" | expr = v; unit = cm; legends = Lateral displacement at midpoint on side edge
    ptgr3: PointGraph "点结果图 3" | expr = mbrn.disp; unit = cm; legends = Total displacement at corner point
    glob1: Global "全局 1"
      data = dset1
      expr = wmax_ref
      unit = cm
      descr = Transverse displacement at midpoint, reference
      legends = Reference values at last step
    glob2: Global "全局 2"
      data = dset1
      expr = vmax_ref
      unit = cm
      descr = Lateral displacement at midpoint on side edge, reference
      legends = Reference values at last step
    glob3: Global "全局 3"
      data = dset1
      expr = dispmax_ref
      unit = cm
      descr = Total displacement at corner point, reference
      legends = Reference values at last step
  pg8: PlotGroup1D "一维绘图组 8" | data = dset1; ylabel = 第一主应力 (kN/cm<sup>2</sup>)
    ptgr1: PointGraph "点结果图 1" | expr = mbrn.sp1; unit = kN/cm^2; legends = First principal stress at midpoint
    glob1: Global "全局 1"
      data = dset1
      expr = sp1max_ref
      unit = kN/cm^2
      descr = First principal stress at midpoint, reference
      legends = Reference value at last step
  pg2: PlotGroup3D "面载荷 (mbrn)" | data = dset1
    arws1: ArrowSurface "面载荷 1" | expr = {mbrn.fl1.F_Ax, mbrn.fl1.F_Ay, mbrn.fl1.F_Az}
      col: Color "颜色表达式" | expr = mbrn.fl1.F_A_Mag
      def: Deform "变形" | expr = {u, v, w}; descr = 位移场
    surf1: Surface "灰色表面" | expr = 1
      def: Deform "变形" | expr = {u, v, w}; descr = 位移场
      sel1: Selection "选择 1"
      tran1: Transparency "透明 1" | transparency = 0.8
  pg3: PlotGroup3D "边载荷 (mbrn)" | data = dset1
    arwl1: ArrowLine "边载荷 1" | expr = {mbrn.el1.F_Lx, mbrn.el1.F_Ly, mbrn.el1.F_Lz}
      col: Color "颜色表达式" | expr = mbrn.el1.F_L_Mag
      def: Deform "变形" | expr = {u, v, w}; descr = 位移场
    surf1: Surface "灰色表面" | expr = 1
      def: Deform "变形" | expr = {u, v, w}; descr = 位移场
      sel1: Selection "选择 1"
      tran1: Transparency "透明 1" | transparency = 0.8
  pg9: PlotGroup1D "Probe Plot Group 9"
    tblp1: Table "Probe Table Graph 1" | table = tbl1; xaxisdata = auto; plotcolumns = 2