// COMSOL Multiphysics 6.0.0.318 model "Volumetric flow rate.mph"
// Outline of the model tree

Parameters
  r = 0.1[mm]  // Radius

Geometry
  geom1 "Geometry 1" (2D, length unit mm)
    pol1: Polygon | source = table; table = {{0, 0}, {10, 0}}
    fin: Finalize "Form Union"

Materials
  mat1: Common "Air" on all boundaries
    def "Basic"
      thermalexpansioncoefficient = alpha_p(pA,T)
      molarmass = 0.02897[kg/mol]
      bulkviscosity = muB(T)
      relpermeability = 1
      relpermittivity = 1
      dynamicviscosity = eta(T)
      ratioofspecificheat = 1.4
      electricconductivity = 0[S/m]
      heatcapacity = Cp(T)
      density = rho(pA,T)
      thermalconductivity = k(T)
      soundspeed = cs(T)
      eta: Piecewise | arg = T; pieces = {200.0, 1600.0, -8.38278E-7+8.35717342E-8*T^1-7.69429583E-11*T^2+4.6437266E-14*T^3-1.06585607E-17*T^4}; argunit = K; fununit = Pa*s
      Cp: Piecewise | arg = T; pieces = {200.0, 1600.0, 1047.63657-0.372589265*T^1+9.45304214E-4*T^2-6.02409443E-7*T^3+1.2858961E-10*T^4}; argunit = K; fununit = J/(kg*K)
      rho: Analytic | expr = pA*0.02897/R_const[K*mol/J]/T; args = {pA, T}; fununit = kg/m^3; argunit = {Pa, K}
      k: Piecewise | arg = T; pieces = {200.0, 1600.0, -0.00227583562+1.15480022E-4*T^1-7.90252856E-8*T^2+4.11702505E-11*T^3-7.43864331E-15*T^4}; argunit = K; fununit = W/(m*K)
      cs: Analytic | expr = sqrt(1.4*R_const[K*mol/J]/0.02897*T); args = T; fununit = m/s; argunit = K
      an1: Analytic | funcname = alpha_p; expr = -1/rho(pA,T)*d(rho(pA,T),T); args = {pA, T}; fununit = 1/K; argunit = {Pa, K}
      an2: Analytic "Analytic 2a" | funcname = muB; expr = 0.6*eta(T); args = T; fununit = Pa*s; argunit = K
    RefractiveIndex
      n = 1
      ki = 0
    NonlinearModel
      BA = (def.gamma+1)/2
    idealGas
      Rs = R_const/Mn
      heatcapacity = Cp(T)
      ratioofspecificheat = 1.4
      molarmass = 0.02897
      Cp: Piecewise | arg = T; pieces = {200.0, 1600.0, 1047.63657-0.372589265*T^1+9.45304214E-4*T^2-6.02409443E-7*T^3+1.2858961E-10*T^4}; argunit = K; fununit = J/(kg*K)

Physics
  pfl: FlowInPipes "Pipe Flow" on all boundaries
    dependent variable u
    fp1: FluidProperties (default)
    pipe1: PipeProperties (default) | shape = Round; innerd = r; roughness = 2
    pr1: Pressure (default)
    lf1: LosslessFitting (default)
    init1: init "Initial Values 1" (default)
    inl1: Inlet on points 1 | spec = 4; pext = 2[atm]
    vf1: VolumeForce on boundaries 1

Mesh
  mesh1 "Mesh 1" (physics-controlled)
    size: MeshSizeDefault | table = cfd; hauto = 1

Studies
  std1 "Study 1"
    stat: Stationary | useparam = on; pname = r; plistarr = range(1,1,10); punit = mm

Solver configurations
  sol1 "Solution 1" (study std1)
    v1: Variables "Dependent Variables 1"
    s1: Stationary "Stationary Solver 1"
      dDef: Direct
      p1: Parametric
      fc1: FullyCoupled | linsolver = dDef; initstep = 0.1; minstep = 1.0E-6; maxiter = 35

Datasets
  dset1: Solution | solution = sol1
  cln1: CutLine2D | data = dset1

Plots
  pg1: PlotGroup2D "Pressure (pfl)" | data = dset1
    line1: Line | expr = p; linetype = tube; radiusexpr = 0.5*pfl.dh
  pg2: PlotGroup2D "Velocity (pfl)" | data = dset1
    arwl1: ArrowLine | expr = {pfl.vX, pfl.vY}; arrowcount = 15; arrowlength = normalized
      col1: Color "Color Expression 1" | expr = pfl.U
  pg3: PlotGroup1D "1D Plot Group 3" | data = dset1
    lngr1: LineGraph on boundaries 1 | expr = pfl.ptot; unit = bar; descr = Total pressure
    lngr2: LineGraph on boundaries 1 | expr = p